<Lems xmlns="http://www.neuroml.org/lems/0.7.3"
      xmlns:xsi="http://www.w3.org/2001/XMLSchema-instance"
      xsi:schemaLocation="http://www.neuroml.org/lems/0.7.3 LEMS_v0.7.3.xsd">

    <ComponentType name="pgh3Cell">

        <Parameter name="gca" dimension="none"/>
        <Parameter name="gkca" dimension="none"/>
        <Parameter name="gk" dimension="none"/>
        <Parameter name="gir" dimension="none"/>
        <Parameter name="vca" dimension="none"/>
        <Parameter name="vk" dimension="none"/>
        <Parameter name="vir" dimension="none"/>
        <Parameter name="cm" dimension="none"/>
        <Parameter name="taun" dimension="none"/>
        <Parameter name="alpha" dimension="none"/>
        <Parameter name="fcyt" dimension="none"/>
        <Parameter name="kpmca" dimension="none"/>
        <Parameter name="kd" dimension="none"/>
        <Parameter name="vn" dimension="none"/>
        <Parameter name="vm" dimension="none"/>
        <Parameter name="sn" dimension="none"/>
        <Parameter name="sm" dimension="none"/>
        <Parameter name="kserca" dimension="none"/>
        <Parameter name="dact" dimension="none"/>
        <Parameter name="dinact" dimension="none"/>
        <Parameter name="fer" dimension="none"/>
        <Parameter name="pleak" dimension="none"/>
        <Parameter name="dip3" dimension="none"/>
        <Parameter name="vcytver" dimension="none"/>
        <Parameter name="ip3" dimension="none"/>
        <Parameter name="sa" dimension="none"/>
        <Parameter name="r" dimension="none"/>
        <Parameter name="taua" dimension="none"/>
        <Parameter name="tstim" dimension="none"/>

        <Exposure name="v" dimension="none"/>
        <Exposure name="c" dimension="none"/>
        <Exposure name="n" dimension="none"/>
        <Exposure name="cer" dimension="none"/>
        <Exposure name="a" dimension="none"/>
        <Exposure name="nIR" dimension="none"/>
        <Exposure name="rIR" dimension="none"/>

    <Exposure name="x" dimension="none"/>

           <Dynamics>
        <StateVariable name="v" dimension="none"/>
        <StateVariable name="c" dimension="none"/>
        <StateVariable name="n" dimension="none"/>
        <StateVariable name="cer" dimension="none"/>
        <StateVariable name="a" dimension="none"/>
        <StateVariable name="nIR" dimension="none"/>
        <StateVariable name="rIR" dimension="none"/>

        <StateVariable name="x" dimension="none" exposure="x"/>
        <OnStart>
            <StateAssignment variable="v" value="-60.0"/>
            <StateAssignment variable="c" value="0.10"/>
            <StateAssignment variable="n" value="0.01"/>
            <StateAssignment variable="cer" value="100"/>
            <StateAssignment variable="a" value="0.46"/>
            <StateAssignment variable="nIR" value="0.008"/>
            <StateAssignment variable="rIR" value="0.282"/>
        </OnStart>

        </Dynamics>

</ComponentType>

</Lems>
